<?xml version="1.0"?>
<?xml-stylesheet type="text/xsl" href="http://jsbsim.sourceforge.net/JSBSim.xsl"?>
<fdm_config name="aileen" release="BETA" version="2.0">

	<fileheader>
		<author> Icarus PoliTO </author>
		<license
			licenseName="GPL (General Public License)"
			licenseURL="http://www.gnu.org/licenses/gpl.html"/>
		<filecreationdate>2025-10-16</filecreationdate>
		<version>1.0</version>
		<description> Models Aileen, a solar powered UAV developed by team Icarus PoliTO </description>
		<note>
			Structural frame origin: nose tip
		</note>
	</fileheader>

	<metrics>

    <!--Dimensioni delle ali-->
    <wingarea unit="M2"> 3.3764 </wingarea>
    <wingspan unit="M"> 7.34 </wingspan>
    <chord unit="M"> 0.46 </chord>
    <!--Dimensioni della coda-->
    <htailarea unit="M2"> 1.05 </htailarea>
    <htailarm unit="M"> 2.012 </htailarm>
    <vtailarea unit="M2"> 0.05928 </vtailarea>
    <vtailarm unit="M"> 1.723 </vtailarm>

    <location name="AERORP" unit="M">
    <x> 0.11790 </x>
    <y> 0.0 </y>
    <z> 0.02342 </z>
    </location>

    <!-- insert if you want use on a 3d sim
    <location name="EYEPOINT" unit="IN">
    <x> 37.0 </x>
    <y> 0.0 </y>
    <z> 48.0 </z>
    </location>

    <location name="VRP" unit="IN">
    <x> 42.6 </x>
    <y> 0.0 </y>
    <z> 38.5 </z>
    </location>

    -->

	</metrics>


	<mass_balance>

    <documentation>

      I inserted the matrix wrt the center of gravity because it is the one required by jsbsim.
      Note that the matrix is symmetric so ixy = xyx and that the elements that are not inserted
      are assumed to be zero.

    </documentation>

    <izz unit="KG*M2"> 69.39 </izz>
    <ixx unit="KG*M2"> 50.05 </ixx>
    <iyy unit="KG*M2"> 20.50 </iyy>
    <ixy unit="KG*M2"> 0.00  </ixy>
    <ixz unit="KG*M2"> 2.54 </ixz>
    <izx unit="KG*M2"> 2.54 </izx>
    <iyz unit="KG*M2"> 0.00 </iyz>


    <emptywt unit="KG"> 24.9 </emptywt>
    <location name="CG" unit="M">
    <x> 0.059 </x>
    <y> 0.00 </y>
    <z> 0.02 </z>
    </location>


	</mass_balance>

	<!-- The actual model doesn't have a landing gear, this is only used to takeoff in the simulation -->
<ground_reactions>
        <contact type="BOGEY" name="NOSE">
            <location unit="M">
                 <x> -3.00 </x> <y> 0 </y>
                 <z> -1.20 </z>
            </location>
            <static_friction>  0.80 </static_friction>
            <dynamic_friction> 0.50 </dynamic_friction>
            <rolling_friction> 0.02 </rolling_friction>
            <spring_coeff unit="N/M"> 1500 </spring_coeff>
            <damping_coeff unit="N/M/SEC"> 200 </damping_coeff> <max_steer> 0 </max_steer>
            <brake_group> NONE </brake_group>
            <retractable> 0 </retractable> </contact>

        <contact type="BOGEY" name="RIGHT">
            <location unit="M">
                 <x> 2.00 </x> <y> 5.00 </y>
                 <z> -1.20 </z>
            </location>
            <static_friction>  0.80 </static_friction>
            <dynamic_friction> 0.50 </dynamic_friction>
            <rolling_friction> 0.02 </rolling_friction>
            <spring_coeff unit="N/M"> 1500 </spring_coeff>
            <damping_coeff unit="N/M/SEC"> 200 </damping_coeff>
            <max_steer> 0 </max_steer>
            <brake_group> NONE </brake_group>
            <retractable> 0 </retractable>
        </contact>

        <contact type="BOGEY" name="LEFT">
            <location unit="M">
                 <x> 2.0 </x> <y> -5.00 </y>
                 <z> -1.20 </z>
            </location>
            <static_friction>  0.80 </static_friction>
            <dynamic_friction> 0.50 </dynamic_friction>
            <rolling_friction> 0.02 </rolling_friction>
            <spring_coeff unit="N/M"> 1500 </spring_coeff>
            <damping_coeff unit="N/M/SEC"> 200 </damping_coeff>
            <max_steer> 0 </max_steer>
            <brake_group> NONE </brake_group>
            <retractable> 0 </retractable>
        </contact>
    </ground_reactions>

	<propulsion>
        <engine file="engine">
            <location unit="M"> <!--Posizione del motore rispetto a CM, da modificare(?) -->
                <x> -1.070 </x>
                <y> 1.102 </y>
                <z> -0.05 </z>
            </location>
            <orient unit="DEG"> <!--Orientamento del motore -->
                <roll> 0.0 </roll>
                <pitch> 0 </pitch>
                <yaw> 0 </yaw>
            </orient>
            <feed>0</feed> <!--serbatoio da cui prende il carburante (0 se c'è solo un motore) -->
            <thruster file="thruster">
                <location unit="M"> <!--Posizione del thruster rispetto a CM, da modificare(?) -->
                    <x> -1.075 </x>
                    <y> 1.102 </y>
                    <z> -0.05 </z>
                </location>
                <orient unit="DEG">
                    <roll> 0.0 </roll>
                    <pitch> 0.0 </pitch>
                    <yaw> 0.0 </yaw>
                </orient>
                <p_factor>1.0</p_factor> <!-- effetto giroscopico dell'elica -->
            </thruster>
        </engine>
		<engine file="engine">
            <location unit="M"> <!--Posizione del motore rispetto a CM, da modificare(?) -->
                <x> -1.070 </x>
                <y> -1.102 </y>
                <z> -0.05 </z>
            </location>
            <orient unit="DEG"> <!--Orientamento del motore -->
                <roll> 0.0 </roll>
                <pitch> 0 </pitch>
                <yaw> 0 </yaw>
            </orient>
            <feed>0</feed> <!--serbatoio da cui prende il carburante (0 se c'è solo un motore) -->
            <thruster file="thruster_ccw">
                <location unit="M"> <!--Posizione del thruster rispetto a CM, da modificare(?) -->
                    <x> -1.075 </x>
                    <y> -1.102 </y>
                    <z> -0.05 </z>
                </location>
                <orient unit="DEG">
                    <roll> 0.0 </roll>
                    <pitch> 0.0 </pitch>
                    <yaw> 0.0 </yaw>
                </orient>
                <p_factor>1.0</p_factor> <!-- effetto giroscopico dell'elica -->
            </thruster>
        </engine>


    </propulsion>

	<flight_control>

		<channel name="Roll">
			<!-- Somma comando e trim -->
			<summer name="fcs/roll-trim-sum">
				<input>fcs/aileron-cmd-norm</input>
				<input>fcs/roll-trim-cmd-norm</input>
				<clipto>
				    <min>-1</min>
				    <max>1</max>
				</clipto>
			</summer>

			<!-- Alettone Sinistro -->
			<actuator name="fcs/left-aileron-control">
				<input>fcs/roll-trim-sum</input>
				<range>
				    <min>-0.175</min> <!-- ~10 gradi -->
				    <max> 0.175</max>
				</range>
				<!--  Ritardo e velocità massima di deflessione del servo (vedi doc)
				<lag> 20 </lag>
				<rate_limit> 1.0 </rate_limit>
				-->
				<output>fcs/left-aileron-pos-rad</output> <!-- Letto dal bridge ArduPilot -->
			</actuator>

			<!-- Alettone Destro -->
			<actuator name="fcs/right-aileron-control">
				<input>-fcs/roll-trim-sum</input> <!-- Segno meno per movimento differenziale -->
				<range>
				    <min>-0.175</min>
				    <max> 0.175</max>
				</range>
				<!--  Ritardo e velocità massima di deflessione del servo (vedi doc)
				<lag> 20 </lag>
				<rate_limit> 1.0 </rate_limit>
				-->
				<output>fcs/right-aileron-pos-rad</output>
			</actuator>

			<!-- Riporta la deflessione al comando (-1,1) corrispondente, comodo per comparare comando e risposta -->
			<aerosurface_scale name="fcs/left-aileron-normalized">
				<input>fcs/left-aileron-pos-rad</input>
				<domain>
				    <min>-0.175</min>
				    <max> 0.175</max>
				</domain>
				<range>
				    <min>-1</min>
				    <max> 1</max>
				</range>
				<output>fcs/left-aileron-pos-norm</output>
			</aerosurface_scale>

			<!-- Riporta la deflessione al comando (-1,1) corrispondente, comodo per comparare comando e risposta -->
			<aerosurface_scale name="fcs/right-aileron-normalized">
				<input>fcs/right-aileron-pos-rad</input>
				<domain>
				    <min>-0.175</min>
				    <max> 0.175</max>
				</domain>
				<range>
				    <min>-1</min>
				    <max> 1</max>
				</range>
				<output>fcs/right-aileron-pos-norm</output>
			</aerosurface_scale>
		</channel>

		<channel name="Pitch">
			<!-- Somma comando e trim -->
			<summer name="fcs/pitch-trim-sum">
				<input>fcs/elevator-cmd-norm</input>
				<input>fcs/pitch-trim-cmd-norm</input>
				<clipto>
				    <min>-1</min>
				    <max>1</max>
				</clipto>
			</summer>

			<!-- Converte il comando (-1, 1) in radianti -->
			<actuator name="fcs/elevator-control">
				<input>fcs/pitch-trim-sum</input>
				<range>
				    <min>-0.4536</min> <!-- ~26 gradi in basso -->
				    <max> 0.4536</max> <!-- ~26 gradi in alto -->
				</range>
				<!--  Ritardo e velocità massima di deflessione del servo (vedi doc)
				<lag> 20 </lag>
				<rate_limit> 1.0 </rate_limit>
				-->
				<output>fcs/elevator-pos-rad</output> <!-- Proprietà letta dal bridge ArduPilot [3] -->
			</actuator>

			<!-- Riporta la deflessione al comando (-1,1) corrispondente, comodo per comparare comando e risposta -->
			<aerosurface_scale name="fcs/elevator-normalized">
				<input>fcs/elevator-pos-rad</input>
				<domain>
				    <min>-0.4536</min>
				    <max> 0.4536</max>
				</domain>
				<range>
				    <min>-1</min>
				    <max> 1</max>
				</range>
				<output>fcs/elevator-pos-norm</output>
			</aerosurface_scale>
		</channel>

		<channel name="Yaw">
			<!-- Somma dei comandi: ArduPilot SITL invia il comando rudder su fcs/rudder-cmd-norm -->
			<summer name="fcs/rudder-command-sum">
				<input>fcs/rudder-cmd-norm</input>
				<input>fcs/yaw-trim-cmd-norm</input> <!-- Trim JSBSim -->
				<clipto>
				    <min>-1</min>
				    <max>1</max>
				</clipto>
			</summer>

			<!-- Conversione dal comando (-1, 1) a deflessione dell'attuatore -->
			<actuator name="fcs/rudder-control"> <!-- actuator meglio di aerosurface_scale perchè permette di definire lag e rate_limit -->
				<input>fcs/rudder-command-sum</input>
				<range>
				    <min>-0.175</min>	<!-- Deflessione inventata tra +-10° -->
				    <max> 0.175</max>
				</range>
				<!--  Ritardo e velocità massima di deflessione del servo (vedi doc)
				<lag> 20 </lag>
				<rate_limit> 1.0 </rate_limit>
				-->
				<output>fcs/rudder-pos-rad</output> <!-- Proprietà letta da ArduPilot -->
			</actuator>

			<!-- Riporta la deflessione al comando (-1,1) corrispondente, comodo per comparare comando e risposta -->
			<aerosurface_scale name="fcs/rudder-normalized">
				<input>fcs/rudder-pos-rad</input>
				<domain>
				    <min>-0.175</min>
				    <max> 0.175</max>
				</domain>
				<range>
				    <min>-1</min>
				    <max> 1</max>
				</range>
				<output>fcs/rudder-pos-norm</output>
			</aerosurface_scale>
		</channel>

	</flight_control>

	<aerodynamics>
		<axis name="DRAG">
            <function name="aero/coefficient/CD0">
                <description>Drag_at_zero_lift</description>
                <product>
                    <property>aero/qbar-psf</property>
                    <property>metrics/Sw-sqft</property>
					<value>0.01822122445</value>
                      <!--<table>
                          <independentVar>aero/alpha-rad</independentVar>
                          <tableData>
                              -0.0873	0.03067224
                              -0.0611	0.02664875
							  -0.0349   0.02599637
                              0	        0.02831189
                              0.01745	    0.03134565
                              0.0349	    0.03515456
							  0.0523599     0.03939129
							  0.06981     0.04450193
							  0.0873		0.05041686
							  0.105		0.05735438
							  0.1222		0.06527867
							  0.1396		0.07345306
							  0.1658	0.08781984
							  0.192	0.10577414
							  0.209	0.11710451
							  0.2269	0.14303852
                          </tableData>
                      </table>-->
                </product>
            </function>
            <function name="aero/coefficient/CDi">
                <description>Induced_drag</description>
                <product>
                    <property>aero/qbar-psf</property>
                    <property>metrics/Sw-sqft</property>
                    <property>aero/cl-squared</property>
                    <value>0.046447893</value>
                </product>
            </function>
            <function name="aero/coefficient/CDbeta">
                <description>Drag_due_to_sideslip</description>
                <product>
                    <property>aero/qbar-psf</property>
                    <property>metrics/Sw-sqft</property>
                    <value>-0.001144</value>
                </product>
            </function>
            <function name="aero/coefficient/CDde">
                <description>Drag_due_to_Elevator_Deflection</description>
                <product>
                    <property>aero/qbar-psf</property>
                    <property>metrics/Sw-sqft</property>
                    <property>fcs/mag-elevator-pos-rad</property>
                    <value>0.0406289</value>
                </product>
            </function>
            <!--<function name="aero/coefficient/dCDprop">
                <description>Drag_due_to_prop_beta</description>
                <product>
                    <property>aero/qbar-psf</property>
                    <property>metrics/Sw-sqft</property>
                      <table>
                          <independentVar>fcs/throttle-pos-norm</independentVar>
                          <tableData>
                              0.0000	0.0700
                              0.0500	0.0000
                              1.0000	0.0000
                          </tableData>
                      </table>
                </product>
            </function> per adesso la drag dovuta al propulsore non ce la mettiamo-->
        </axis>

        <axis name="SIDE">
            <function name="aero/coefficient/CYb">
                <description>Side_force_due_to_beta</description>
                <product>
                    <property>aero/qbar-psf</property>
                    <property>metrics/Sw-sqft</property>
                    <property>aero/beta-rad</property>
                    <value>-0.1827751</value>
                </product>
            </function>
        </axis>

        <axis name="LIFT">
            <function name="aero/coefficient/CLalpha">
                <description>Lift_curve_from_table</description>
                <product>
                    <property>aero/qbar-psf</property>
                    <property>metrics/Sw-sqft</property>
                    <table>
                        <independentVar>aero/alpha-rad</independentVar>
                        <tableData>
                            -0.1396    -0.3312006744
                            -0.122     -0.2216600823
                            -0.104     -0.1119023758
                            -0.0872    -0.002181761259
                            -0.0698     0.1075699376
                            -0.0523     0.2172941784
                            -0.0349     0.3268828496
                            -0.0174     0.4363580436
                             0          0.5457381555
                             0.0174     0.654876376
                             0.0349     0.7638405022
                             0.0523     0.8723865089
                             0.0698     0.9807605094
                             0.0872     1.089053072
                             0.104      1.196360687
                             0.122      1.30504963
                             0.1396     1.412286709
                             0.157      1.518855218
                             0.174      1.626582291
                        </tableData>
                    </table>
                </product>
            </function>

            <function name="aero/coefficient/Lde">
                <description>Lift_due_to_Elevator_Deflection</description>
                <product>
                    <property>aero/qbar-psf</property>
                    <property>fcs/elevator-pos-norm</property>
                    <value>0.6049687</value>
                </product>
            </function>
        </axis>

    <!--


<axis name="LIFT">
            <function name="aero/coefficient/CL0">
                <description>Lift_at_zero_alpha</description>
                <product>
                    <property>aero/qbar-psf</property>
                    <property>metrics/Sw-sqft</property>
                    <value>0.5457381</value>
                </product>
            </function>

            <function name="aero/coefficient/Lalpha">
                <description>Lift_due_to_alpha</description>
                <product>
                    <property>aero/qbar-psf</property>
                    <property>metrics/Sw-sqft</property>
                    <property>aero/alpha-rad</property> <value>6.2047274</value>
                </product>
            </function>

            <function name="aero/coefficient/Lde">
                <description>Lift_due_to_Elevator_Deflection</description>
                <product>
                    <property>aero/qbar-psf</property>
                    <property>fcs/elevator-pos-norm</property>
                    <value>0.6049687</value>
                </product>
            </function>
    </axis>


    -->

        <axis name="ROLL">
            <function name="aero/coefficient/Clb">
                <description>Roll_moment_due_to_beta</description>
                <product>
                    <property>aero/qbar-psf</property>
                    <property>metrics/Sw-sqft</property>
                    <property>metrics/bw-ft</property>
                    <property>aero/beta-rad</property>
                    <value>-0.0508198</value>
                </product>
            </function>
            <function name="aero/coefficient/Clp">
                <description>Roll_moment_due_to_roll_rate</description>
                <product>
                    <property>aero/qbar-psf</property>
                    <property>metrics/Sw-sqft</property>
                    <property>metrics/bw-ft</property>
                    <property>aero/bi2vel</property>
                    <property>velocities/p-aero-rad_sec</property>
                    <value>-0.7083722</value>
                </product>
            </function>
            <function name="aero/coefficient/Clr">
                <description>Roll_moment_due_to_yaw_rate</description>
                <product>
                    <property>aero/qbar-psf</property>
                    <property>metrics/Sw-sqft</property>
                    <property>metrics/bw-ft</property>
                    <property>aero/bi2vel</property>
                    <property>velocities/r-aero-rad_sec</property>
                    <value>0.1837143</value>
                </product>
            </function>
            <function name="aero/coefficient/Clda">
                <description>Roll_moment_due_to_aileron</description>
                <product>
                    <property>aero/qbar-psf</property>
                    <property>metrics/Sw-sqft</property>
                    <property>metrics/bw-ft</property>
                    <property>fcs/left-aileron-pos-rad</property>
                    <value>0.4462468</value>
                </product>
            </function>
            <function name="aero/coefficient/Cldr">
                <description>Roll_moment_due_to_rudder</description>
                <product>
                    <property>aero/qbar-psf</property>
                    <property>metrics/Sw-sqft</property>
                    <property>metrics/bw-ft</property>
                    <property>fcs/rudder-pos-rad</property>
                    <value>0.0012766</value> <!--contributo del Cl da parte dell'imbardata e quindi dei timoni-->
                </product>
            </function>
        </axis>

        <axis name="PITCH">
            <function name="aero/coefficient/Cmalpha">
                <description>Pitch_moment_due_to_alpha</description>
                <product>
                    <property>aero/qbar-psf</property>
                    <property>metrics/Sw-sqft</property>
                    <property>metrics/cbarw-ft</property>
                    <property>aero/alpha-rad</property>
                    <value>-1.2361992</value>
                </product>
            </function>
            <function name="aero/coefficient/Cmde">
                <description>Pitch_moment_due_to_elevator</description>
                <product>
                    <property>aero/qbar-psf</property>
                    <property>metrics/Sw-sqft</property>
                    <property>metrics/cbarw-ft</property>
                    <property>fcs/elevator-pos-rad</property>
                    <value>-2.2738976</value>
                </product>
            </function>
            <function name="aero/coefficient/Cmq">
                <description>Pitch_moment_due_to_pitch_rate</description>
                <product>
                    <property>aero/qbar-psf</property>
                    <property>metrics/Sw-sqft</property>
                    <property>metrics/cbarw-ft</property>
                    <property>aero/ci2vel</property>
                    <property>velocities/q-aero-rad_sec</property>
                    <value>-41.7111449</value> <!--Madonna sto aereo longitudinalmente è stabilissimo-->
                </product>
            </function>
            <!--<function name="aero/coefficient/Cmadot">
                <description>Pitch_moment_due_to_alpha_rate</description>
                <product>
                    <property>aero/qbar-psf</property>
                    <property>metrics/Sw-sqft</property>
                    <property>metrics/cbarw-ft</property>
                    <property>aero/ci2vel</property>
                    <property>aero/alphadot-rad_sec</property>
                    <value>-8.0000</value>
                </product>
            </function> per adesso non lo mettiamo-->
        </axis>

        <axis name="YAW">
            <function name="aero/coefficient/Cnb">
                <description>Yaw_moment_due_to_beta</description>
                <product>
                    <property>aero/qbar-psf</property>
                    <property>metrics/Sw-sqft</property>
                    <property>metrics/bw-ft</property>
                    <property>aero/beta-rad</property>
                    <value>0.0283721</value>
                </product>
            </function>
            <function name="aero/coefficient/Cnr">
                <description>Yaw_moment_due_to_yaw_rate</description>
                <product>
                    <property>aero/qbar-psf</property>
                    <property>metrics/Sw-sqft</property>
                    <property>metrics/bw-ft</property>
                    <property>aero/bi2vel</property>
                    <property>velocities/r-aero-rad_sec</property>
                    <value>-0.0229666</value>
                </product>
            </function>
            <function name="aero/coefficient/Cndr">
                <description>Yaw_moment_due_to_rudder</description>
                <product>
                    <property>aero/qbar-psf</property>
                    <property>metrics/Sw-sqft</property>
                    <property>metrics/bw-ft</property>
                    <property>fcs/rudder-pos-rad</property>
                    <value>-0.0285493</value>
                </product>
            </function>
            <function name="aero/coefficient/Cnda">
                <description>Adverse_yaw</description>
                <product>
                    <property>aero/qbar-psf</property>
                    <property>metrics/Sw-sqft</property>
                    <property>metrics/bw-ft</property>
                    <property>fcs/left-aileron-pos-rad</property>
                    <value>0.0019389</value>
                </product>
            </function>
        </axis>
	</aerodynamics>

	<input port="5505"/>
</fdm_config>
