<?xml version="1.0"?>


<propeller name="20.5x20.5E(CD)">
  <ixx> 0.00085 </ixx>
  <diameter unit="IN"> 20.5 </diameter> <!-- modified -->
  <numblades> 2 </numblades>
  <minpitch> 20.5 </minpitch>
  <maxpitch> 20.5 </maxpitch> <!--modified -->
  <thrust unit="N">47.9</thrust> <!--massima spinta -->

  <table name="C_THRUST" type="internal">
  <tableData>
    0.0000   0.1090
    0.0397   0.1086
    0.0794   0.1082
    0.1191   0.1078
    0.1588   0.1073
    0.1985   0.1067
    0.2382   0.1060
    0.2779   0.1052
    0.3176   0.1041
    0.3573   0.1027
    0.3970   0.1011
    0.4367   0.0991
    0.4764   0.0967
    0.5161   0.0939
    0.5558   0.0906
    0.5955   0.0868
    0.6352   0.0825
    0.6749   0.0777
    0.7146   0.0723
    0.7543   0.0664
    0.7940   0.0602
    0.8337   0.0538
    0.8734   0.0471
    0.9131   0.0404
    0.9529   0.0335
    0.9926   0.0266
    1.0323   0.0197
    1.0720   0.0130
    1.1117   0.0064
    1.1514   0.0000
  </tableData>
  </table>

  <table name="C_POWER" type="internal">
  <tableData>
    0.0000   0.0511
    0.0397   0.0522
    0.0794   0.0535
    0.1191   0.0549
    0.1588   0.0564
    0.1985   0.0580
    0.2382   0.0597
    0.2779   0.0615
    0.3176   0.0632
    0.3573   0.0648
    0.3970   0.0664
    0.4367   0.0677
    0.4764   0.0687
    0.5161   0.0694
    0.5558   0.0696
    0.5955   0.0693
    0.6352   0.0685
    0.6749   0.0669
    0.7146   0.0647
    0.7543   0.0617
    0.7940   0.0582
    0.8337   0.0541
    0.8734   0.0495
    0.9131   0.0445
    0.9529   0.0391
    0.9926   0.0333
    1.0323   0.0273
    1.0720   0.0210
    1.1117   0.0146
    1.1514   0.0081
  </tableData>
</table>

</propeller>
